** THIS INPUT FILE HAS BEEN GENERATED BY JOAQUIN GARCIA-SUAREZ
** (CALTECH, 2020), IN THE CONTEXT OF THE RESEARCH PRESENTED IN
** THE PAPER "Exact dynamic response of smooth rigid retaining
** walls resting on bedrock".
** IT PROVIDES AN ILLUSTRATIVE EXAMPLE OF THE SIMULATIONS RUN IN
** ORDER TO GENERATE THE TRANSFER FUNCTION SHOWN IN THE
** AFOREMENTIONED PAPER.
**
**
**
*Heading
** Job name: abaqus_input_example Model name: Model-1
** Generated by: Abaqus/CAE 6.14-2
*Preprint, echo=NO, model=NO, history=NO, contact=NO
**
** PARTS
**
*Part, name=Part-1
*Node
      1,           0.,   18.3400002
      2,  0.479999989,          18.
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*Element, type=CPEG6
  1, 5882, 4780, 4789, 5995, 5996, 5997
  2, 4978, 5021, 5047, 5998, 5999, 6000
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*Element, type=CPEG8R
 167,    51,  1661,  1418,    48,  6491,  6492,  6493,  6494
 168,  1661,    51,   274,    87,  6491,  6495,  6496,  6497
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*Node
  29725,           0.,           0.,           0.
*Nset, nset=Part-1-RefPt_, internal
29725,
*Nset, nset=_PickedSet2, internal, generate
     1,  29724,      1
*Elset, elset=_PickedSet2, internal, generate
    1,  9527,     1
*Nset, nset=_PickedSet18, internal, generate
     1,  29724,      1
*Elset, elset=_PickedSet18, internal, generate
    1,  9527,     1
** Section: plane strain
*Solid Section, elset=_PickedSet2, material=Soil, ref node=Part-1-RefPt_
1.,
*End Part
**
**
** ASSEMBLY
**
*Assembly, name=Assembly
**
*Instance, name=Part-1-1, part=Part-1
*End Instance
**
*Nset, nset="ref point", instance=Part-1-1
 29725,
*Nset, nset=v_top, instance=Part-1-1
 254,
*Nset, nset=_PickedSet23, internal, instance=Part-1-1
 29725,
*Nset, nset=_PickedSet27, internal, instance=Part-1-1
 29725,
*Nset, nset=_PickedSet30, internal, instance=Part-1-1
 29725,
*Nset, nset=_PickedSet32, internal, instance=Part-1-1
 29725,
*Nset, nset=_PickedSet44, internal, instance=Part-1-1
 22561, 22681, 22782, 22918, 23051, 24955, 24959, 24962, 24965
*Elset, elset=_PickedSet44, internal, instance=Part-1-1, generate
 7408,  7411,     1
*Nset, nset=_PickedSet45, internal, instance=Part-1-1
     2,    32,    56,    58,    61,    63
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*Elset, elset=_PickedSet45, internal, instance=Part-1-1
  246,  247,  249,  250,  251,  252
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*Elset, elset=__PickedSurf34_S2, internal, instance=Part-1-1
  246, 6037, 6137
*Elset, elset=__PickedSurf34_S3, internal, instance=Part-1-1
  247,  250,  270, 1384, 1396, 2218
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*Elset, elset=__PickedSurf34_S1, internal, instance=Part-1-1
  249,  251,  252,  260,  261,  262
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*Surface, type=ELEMENT, name=_PickedSurf34, internal
__PickedSurf34_S2, S2
__PickedSurf34_S3, S3
__PickedSurf34_S1, S1
*Elset, elset=__PickedSurf39_S4, internal, instance=Part-1-1
  167,  295,  317,  343,  368,  369
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*Elset, elset=__PickedSurf39_S2, internal, instance=Part-1-1
  168,  218,  220,  294,  391,  490
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*Elset, elset=__PickedSurf39_S1, internal, instance=Part-1-1
 1349, 2460
*Surface, type=ELEMENT, name=_PickedSurf39, internal
__PickedSurf39_S4, S4
__PickedSurf39_S2, S2
__PickedSurf39_S1, S1
** Constraint: wall
*Coupling, constraint name=wall, ref node=_PickedSet23, surface=_PickedSurf39
*Kinematic
1, 1
*End Assembly
*Amplitude, name=Amp-1, definition=PERIODIC
1,          690.38,              0.,              0.
             0.,              1.
**
** MATERIALS
**
*Material, name=Soil
*Damping, structural=0.1
*Density
2000.,
*Elastic
 1e+09, 0.4375
**
** BOUNDARY CONDITIONS
**
** Name: base Type: Displacement/Rotation
*Boundary
_PickedSet45, 1, 1
_PickedSet45, 2, 2
_PickedSet45, 6, 6
** Name: far-field Type: Displacement/Rotation
*Boundary
_PickedSet44, 2, 2
** Name: ref point Type: Displacement/Rotation
*Boundary
_PickedSet27, 1, 1
_PickedSet27, 2, 2
_PickedSet27, 6, 6
** ----------------------------------------------------------------
**
** STEP: Step-4
**
*Step, name=Step-4, nlgeom=NO, perturbation
*Frequency, eigensolver=Lanczos, sim, acoustic coupling=projection, normalization=mass
, 0., 350., , ,
**
** OUTPUT REQUESTS
**
*Restart, write, frequency=0
*Output, field
*Node Output
*End Step
** ----------------------------------------------------------------
**
** STEP: Step-5
**
*Step, name=Step-5, nlgeom=NO, perturbation
*Steady State Dynamics, frequency scale=LINEAR, interval=RANGE
0., 350., 500, 1.
**
** LOADS
**
** Name: Load-2   Type: Gravity
*Dload, real
, GRAV, 0.73, -1., 0.
**
** OUTPUT REQUESTS
**
*Output, field, frequency=0
**
** HISTORY OUTPUT: ref point freq
**
*Output, history
*Node Output, nset="ref point"
RF1, RF2, RF3, RM1, RM2, RM3
**
** HISTORY OUTPUT: v_top
**
*Node Output, nset=v_top
U1, U2, U3
*End Step
